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# СМО (27 вариант)
p1 := 0.4
_p1 := 1 - p1 = 0.6
p2 := 0.5
_p2 := 1 - p2 = 0.5
P2000 := 0
P1100 := 0
P1101 := 0
P1021 := 0
P1121 := 0
P1000 := 0
P1001 := 0
P1011 := 0
P1111 := 0
P2100 := 0
P2101 := 0
P2111 := 0
P2121 := 0
Given
P2100 == P1000 + p1*P1100 + _p2*P1001 + p1*_p2*P1101
P1100 == p1*P2100 + p1*_p2*P2101
P1001 == _p1*P2100 + _p1*_p2*P2101
P2101 == _p1*P1100 + p2*P1001 + (p1*p2 + _p1*_p2)*P1101 + _p2*P1011 + p1*_p2*P1111
P1101 == p1*p2*P2101 + p1*_p2*P2111
P1011 == _p1*p2*P2101 + _p1*_p2*P2111
P2111 == _p1*p2*P1101 + p2*P1011 + _p2*P1021 + (p1*p2 + _p1*_p2)*P1111 + p1*_p2*P1121
P1021 == _p1*p2*P2111 + (_p1*p2 + _p1*_p2)*P2121
P1111 == p1*p2*P2111 + p1*_p2*P2121
P2121 == p2*P1021 + _p1*p2*P1111 + (p1*p2 + _p1*p2 + _p1*_p2)*P1121
P1121 == p1*p2*P2121
1 == P2000 + P1000 + P2100 + P1100 + P1001 + P2101 + P1101 + P1011 + P2111 + P1021 + P1111 + P2121 + P1121
[P2100; P1100; P1001; P2101; P1101; P1011; P2111; P1021; P1111; P2121; P1121] := Minerr(P2100, P1100, P1001, P2101, P1101, P1011, P2111, P1021, P1111, P2121, P1121) → [0.112859153763; 0.0865777924981; 0.129866688747; 0.207170654964; 0.0664734619525; 0.0997101929287; 0.125196654798; 0.0704231183241; 0.0359940382545; 0.0547735364743; 0.0109547072949]
sum1 := P1000 + P1100 + P1001 + P1101 + P1011 + P1021 + P1111 + P1121 = 0.5
sum2 := P2100 + P1100 + P2101 + P1101 + P2111 + P1111 + P2121 + P1121 = 0.7
Potk1 := (P1100 + P1101 + P1111 + P1121)/sum1*p1
Potk2 := (P1121 + P2121)/sum2*p2
Potk := Potk1 + (1 - Potk1)*Potk2 = 0.199437
Pbl := 0
Loch := 1*(P1011 + P2111 + P1111) + 2*(P1021 + P2121 + P1121) = 0.533204
Lc := 1*(P2100 + P1001 + P1100) + 2*(P2101 + P1011 + P1101) + 3*(P2111 + P1111 + P1021) + 4*(P2121 + P1121) = 2.03377
Q := 1 - Potk = 0.800563
A := (1 - P2000 - P1000 - P2100 - P1100)*_p2 = 0.400282
Woch := Loch/A = 1.33207
Kkan1 := P2100 + P2101 + P2111 + P1111 + P2121 + P1101 + P1100 + P1121 = 0.7
Kkan2 := P1001 + P2101 + P1011 + P2111 + P1111 + P2121 + P1021 + P1101 + P1121 = 0.800563
Wc := 1/(1 - p1) + (Loch + Kkan2)/A = 4.99874
