# 5-6 labs, СМО (27 вариант)
m := 0.5
L := 0.45
p := 0.4
P1 := 0
P3 := 0
P5 := 0
P2 := 0
P4 := 0
P6 := 0
Given
P1*L == m*(P2 + P3)
P2*(L + m) == L*p*P1 + P4*m
P3*(L + m) == L*(1 - p)*P1 + m*(P5 + P6)
P4*m == L*p*(P2 + P6)
P5*(L*p + m) == P3*L*(1 - p)
P6*(L*p + m) == P3*L*p + P5*L*p + P2*L*(1 - p)
1 == P1 + P2 + P3 + P4 + P5 + P6
[P1; P2; P3; P4; P5; P6] := Find(P1, P2, P3, P4, P5, P6) → [0.369003690037; 0.115707658292; 0.216395662741; 0.0870032223416; 0.0859218072649; 0.125967959323]
Potk1 := P4 = 0.0870032
Q1 := 1 - Potk1 = 0.912997
Potk2 := P6 + P5 + P4 + (1 - (P6 + P5 + P4))*P6/(P5 + P6 + P3)*L*p/(m + L*p) + (1 - (P6 + P5 + P4))*P5/(P5 + P6)*L*p/(m + L*p) = 0.428734
Q2 := 1 - Potk2 = 0.571266
